// SBML level 2 version 4

function Aerobic_Energy_Creation(Alpha, Oxy, Glc)
  Alpha*Oxy*Glc;
end

function Energy_Degradation_0(Gamma, Energy)
  Gamma*Energy;
end

function Anaerobic_Energy_Creation(Beta, Glc)
  Beta*Glc;
end

model New_Model()

  // Compartments:
  compartment Cell = 1;

  // Species:
  species Energy in Cell = 5;
  species Glc in Cell = 32;
  species Hydrogen in Cell = 0;
  species Oxy in Cell = 38;

  // Parameters:
  Alpha = 3;
  Beta = 2;
  Gamma = 0.3;
  phenotype_cycle_transition_rate_0_1 = 0; phenotype_cycle_transition_rate_0_1 is "phenotype.cycle.transition_rate_0_1";
  phenotype_death_rate_0 = 0; phenotype_death_rate_0 is "phenotype.death.rate_0";
  E_cyc_threshold = 10;
  E_death_threshold = 3;
  Initial_for_E_cyc_threshold = E_cyc_threshold;
  Initial_for_E_death_threshold = E_death_threshold;

  // Reactions:
  Aerobic_Reaction: Oxy + Glc => Energy; Cell*Aerobic_Energy_Creation(Alpha, Oxy, Glc);
  Anaerobic_Reaction: Glc => Energy + Hydrogen; Cell*Anaerobic_Energy_Creation(Beta, Glc);
  Energy_Degradation: Energy => ; Cell*Energy_Degradation_0(Gamma, Energy);

  // Events:
  Normal: at (Energy < Initial_for_E_cyc_threshold): phenotype_cycle_transition_rate_0_1 = 0;
  Divide: at (Energy > E_cyc_threshold): phenotype_cycle_transition_rate_0_1 = 9e99;
  Normal2: at (Energy > E_death_threshold): phenotype_death_rate_0 = 0;
  Death: at (Energy < Initial_for_E_death_threshold): phenotype_death_rate_0 = 9e99;

  // Unit definitions:
  unit volume = 1e-3 litre;
  unit time = 60 second;
  unit substance = 1e-3 mole;
end
